<?xml version="1.0" encoding="UTF-8"?>
<neuroml xmlns="http://www.neuroml.org/schema/neuroml2"
    xmlns:xsi="http://www.w3.org/2001/XMLSchema-instance"
    xsi:schemaLocation="http://www.neuroml.org/schema/neuroml2 https://raw.github.com/NeuroML/NeuroML2/development/Schemas/NeuroML2/NeuroML_v2beta4.xsd"
    id = "NeuroML2_file_exported_from_NEURON">

  <cell id="LawrenceOLM">

    <morphology id="morphology">
<!-- Section: LawrenceOLM[0].soma[0] (segmentGroup: soma_0) which has 2 3D points, so 1 segment(s)-->
      <segment id="0" name = "Seg0_soma_0">
        <proximal x="138.2" y="224.9" z="0.01" diameter="5.87"/>
        <distal x="138.2" y="224.9" z="-0.01" diameter="5.87"/>
      </segment>
<!-- Section: LawrenceOLM[0].dendrite[2] (segmentGroup: dendrite_2) which has 2 3D points, so 1 segment(s)-->
      <segment id="39" name = "Seg0_dendrite_2">
        <parent segment="0"/>
        <proximal x="138.2" y="224.9" z="-0.01" diameter="5.87"/>
        <distal x="133.6" y="228.2" z="0.73" diameter="3.52"/>
      </segment>
<!-- Section: LawrenceOLM[0].dendrite[1] (segmentGroup: dendrite_1) which has 27 3D points, so 26 segment(s)-->
      <segment id="13" name = "Seg0_dendrite_1">
        <parent segment="0"/>
        <proximal x="138.2" y="224.9" z="-0.01" diameter="5.87"/>
        <distal x="133.2" y="224.5" z="0.63" diameter="4.69"/>
      </segment>
      <segment id="14" name = "Seg1_dendrite_1">
        <parent segment="13"/>
        <distal x="130.1" y="224.7" z="-0.23" diameter="3.86"/>
      </segment>
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
<!-- Section: LawrenceOLM[0].soma[0] (segmentGroup: soma_0) which has 2 3D points, so 1 segment(s)-->

      <segmentGroup id = "soma_0"  neuroLexId="sao864921383">
         <notes>This group contains an unbranched set of segments, and all of the segmentGroups marked with
             neuroLexId = sao864921383 form a non-overlapping set of all of the segments.
             These segmentGroups correspond to the 'cables' of NeuroML v1.8.1, and map to/from NEURON sections.</notes>
        <member segment = "0"/>
      </segmentGroup>

<!-- Section: LawrenceOLM[0].dendrite[2] (segmentGroup: dendrite_2) which has 2 3D points, so 1 segment(s)-->

      <segmentGroup id = "dendrite_2"  neuroLexId="sao864921383">
         <notes>This group contains an unbranched set of segments, and all of the segmentGroups marked with
             neuroLexId = sao864921383 form a non-overlapping set of all of the segments.
             These segmentGroups correspond to the 'cables' of NeuroML v1.8.1, and map to/from NEURON sections.</notes>
        <member segment = "39"/>
      </segmentGroup>

<!-- Section: LawrenceOLM[0].dendrite[1] (segmentGroup: dendrite_1) which has 27 3D points, so 26 segment(s)-->

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
      <segmentGroup id="dendrite_group">
        <include segmentGroup = "dendrite_2"/>
        <include segmentGroup = "dendrite_1"/>
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      </segmentGroup>

      <segmentGroup id="ModelViewParmSubset_2">
        <include segmentGroup = "soma_0"/>
        <include segmentGroup = "dendrite_2"/>
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      </segmentGroup>

      <segmentGroup id="ModelViewParmSubset_3">
        <include segmentGroup = "soma_0"/>
        <include segmentGroup = "dendrite_2"/>
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      </segmentGroup>

      <segmentGroup id="soma_group">
        <include segmentGroup = "soma_0"/>
        <include segmentGroup = "soma_1"/>
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      </segmentGroup>

      <segmentGroup id="axon_group">
        <include segmentGroup = "axon_0"/>
        <include segmentGroup = "axon_1"/>
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      </segmentGroup>

    </morphology>

    <!-- Biophysical properties -->

    <biophysicalProperties id="biophys">

      <membraneProperties>

        <channelDensityGHK2 ionChannel="cal" id="cal_dendrite_group" condDensity="2.5 mS_per_cm2" segmentGroup="dendrite_group" ion="ca"/>
        <channelDensityGHK2 ionChannel="cat" id="cat_dendrite_group" condDensity="0.25 mS_per_cm2" segmentGroup="dendrite_group" ion="ca"/>

        <channelDensity ionChannel="kca" id="kca_XXX"  condDensity = "0.55 mS_per_cm2" segmentGroup="ModelViewParmSubset_1"  erev="-95.000000mV" />

        <channelDensity ionChannel="Ika" id="Ika_XXX"  condDensity = "0.25 mS_per_cm2" segmentGroup="ModelViewParmSubset_2"  erev="-95.000000mV" />

        <channelDensity ionChannel="IM" id="IM_XXX"  condDensity = "0.3 mS_per_cm2" segmentGroup="ModelViewParmSubset_3"  erev="-95.000000mV" />

        <channelDensity ionChannel="Ih" id="Ih_XXX"  condDensity = "0.05 mS_per_cm2" segmentGroup="ModelViewParmSubset_4"  erev="-32.900000mV" />

        <channelDensity ionChannel="Ikdrf" id="Ikdrf_XXX"  condDensity = "0.6 mS_per_cm2" segmentGroup="ModelViewParmSubset_2"  erev="-95.000000mV" />

        <channelDensity ionChannel="Ikdrfaxon" id="Ikdrfaxon_XXX"  condDensity = "0.6 mS_per_cm2" segmentGroup="ModelViewParmSubset_5"  erev="-95.000000mV" />

        <channelDensity ionChannel="Ikdrs" id="Ikdrs_XXX"  condDensity = "0.23 mS_per_cm2" segmentGroup="ModelViewParmSubset_2"  erev="-95.000000mV" />

        <channelDensity ionChannel="Ikdrsaxon" id="Ikdrsaxon_XXX"  condDensity = "0.23 mS_per_cm2" segmentGroup="ModelViewParmSubset_5"  erev="-95.000000mV" />

        <channelDensity ionChannel="Kleakaxon" id="Kleakaxon_XXX"  condDensity = "0.017742 mS_per_cm2" segmentGroup="ModelViewParmSubset_5"  erev="-95.000000mV" />

        <channelDensity ionChannel="Kleaksd" id="Kleaksd_XXX"  condDensity = "0.0032258 mS_per_cm2" segmentGroup="ModelViewParmSubset_2"  erev="-95.000000mV" />

        <channelDensity ionChannel="passaxon" id="passaxon_XXX"  condDensity = "0.061771 mS_per_cm2" segmentGroup="ModelViewParmSubset_5"  erev="-70.000000mV" />

        <channelDensity ionChannel="passsd" id="passsd_XXX"  condDensity = "0.011231 mS_per_cm2" segmentGroup="ModelViewParmSubset_2"  erev="-70.000000mV" />

        <channelDensity ionChannel="Naaxon" id="Naaxon_XXX"  condDensity = "10.7 mS_per_cm2" segmentGroup="ModelViewParmSubset_5"  erev="90.000000mV" />

        <channelDensity ionChannel="Nadend" id="Nadend_XXX"  condDensity = "11.7 mS_per_cm2" segmentGroup="ModelViewParmSubset_1"  erev="90.000000mV" />

        <channelDensity ionChannel="Nasoma" id="Nasoma_XXX"  condDensity = "10.7 mS_per_cm2" segmentGroup="ModelViewParmSubset_4"  erev="90.000000mV" />

        <specificCapacitance  value="0.9 uF_per_cm2" />

      </membraneProperties>

      <intracellularProperties>

        <resistivity value="0.3 kohm_cm" />

      </intracellularProperties>

    </biophysicalProperties>

  </cell>

  <network id="network" type="networkWithTemperature" temperature="24 degC">
    <population id="Pop_LawrenceOLM_0_0" component="LawrenceOLM_0_0" size="1" type="populationList">
        <instance id="0">
            <location x="0" y="0" z="0"/>
        </instance>
    </population>
  </network>

</neuroml>
